// SBML level 2 version 4

function f(x)
  x*2;
end

function hill_func(x, K, n)
  1/(1 + (x/K)^n);
end

function a_prime(a, Km)
  a/Km;
end

function one_plus_a_prime(a, Km)
  1 + a_prime(a, Km);
end

model BMegModel()

  // Compartments:
  compartment TestTube = 1;

  // Species:
  species Mat_GFP in TestTube = 0;
  species Mat_RFP in TestTube = 0;
  species GFP in TestTube = 0;
  species RFP in TestTube = 0;
  species RFP_i1 in TestTube = 0;
  species RFP_i2 in TestTube = 0;
  species mRNA_GFP in TestTube = 0;
  species mRNA_RFP in TestTube = 0;
  species prom_GFP in TestTube = 1;
  species prom_RFP in TestTube = 1;
  species NTP in TestTube = 5000;
  species NMP in TestTube = 0;
  species AA in TestTube = 30000;
  species Ribo in TestTube = 10;
  species RNAP in TestTube = 1;
  species RNAP_prom_GFP in TestTube = 0;
  species RNAP_prom_RFP in TestTube = 0;
  species RNAP_prom_GFP_elong in TestTube = 0;
  species RNAP_prom_RFP_elong in TestTube = 0;
  species Ribo_mRNA_GFP in TestTube = 0;
  species Ribo_mRNA_RFP in TestTube = 0;
  species Ribo_mRNA_GFP_elong in TestTube = 0;
  species Ribo_mRNA_RFP_elong in TestTube = 0;
  species IInd_nrg_src in TestTube = 5000;
  species NTP_waste_track in TestTube = 0;
  species NTP_tx_gfp_track in TestTube = 0;
  species NTP_tx_rfp_track in TestTube = 0;
  species NTP_tl_gfp_track in TestTube = 0;
  species NTP_tl_rfp_track in TestTube = 0;

  // Parameters:
  tl_rate_gfp = 10000;
  tl_rate_rfp = 10000;
  tl_escape_rate_gfp = 100;
  tl_escape_rate_rfp = 100;
  tx_rate = 1000;
  tx_escape_rate_gfp = 100;
  tx_escape_rate_rfp = 100;
  rna_deg_rate = 0.2;
  gfp_mat_rate = 0.06;
  rfp_mat_rate1 = 0.01;
  rfp_mat_rate2 = 0.01;
  rfp_mat_rate3 = 0.01;
  ntp_deg_rate = 0.01;
  nmp_deg_rate = 0.01;
  Km_ntp_rnap = 0.1;
  Km_ntp_ribo = 10;
  Km_aa_ribo = 1000;
  kon_prom = 1;
  koff_prom_gfp = 4;
  koff_prom_rfp = 4;
  kon_mrna_gfp = 400;
  kon_mrna_rfp = 400;
  koff_mrna_gfp = 100;
  koff_mrna_rfp = 100;
  mrna_gfp_len = 1150;
  mrna_rfp_len = 1102;
  prot_gfp_len = 245;
  prot_rfp_len = 236;
  regen_rate = 60;
  Km_IInd_nrg_src = 800;
  Km_nmp_regen = 15;
  xylr_conc = 0;
  xylose_conc = 0;
  Kd = 1;
  Kx = 1;
  n = 1;
  m = 1;
  ribo_deg_rate = 0.01;

  // Reactions:
  gfp_mat_rxn: GFP => Mat_GFP; TestTube*gfp_mat_rate*GFP;
  rfp_mat_rxn1: RFP => RFP_i1; TestTube*rfp_mat_rate1*RFP;
  rfp_mat_rxn2: RFP_i1 => RFP_i2; TestTube*rfp_mat_rate2*RFP_i1;
  rfp_mat_rxn3: RFP_i2 => Mat_RFP; TestTube*rfp_mat_rate3*RFP_i2;
  mrna_gfp_deg_rxn: mRNA_GFP => mrna_gfp_len NMP; TestTube*rna_deg_rate*mRNA_GFP;
  mrna_rfp_deg_rxn: mRNA_RFP => mrna_rfp_len NMP; TestTube*rna_deg_rate*mRNA_RFP;
  ntp_deg_rxn: NTP => NMP + NTP_waste_track; TestTube*ntp_deg_rate*NTP;
  nmp_deg_rxn: NMP => ; TestTube*nmp_deg_rate*NMP;
  prom_gfp_rnap_on_rxn: prom_GFP + RNAP => RNAP_prom_GFP; TestTube*kon_prom*prom_GFP*RNAP;
  prom_rfp_rnap_on_rxn: prom_RFP + RNAP => RNAP_prom_RFP; TestTube*kon_prom*prom_RFP*RNAP;
  prom_gfp_rnap_off_rxn: RNAP_prom_GFP => prom_GFP + RNAP; TestTube*koff_prom_gfp*RNAP_prom_GFP;
  prom_rfp_rnap_off_rxn: RNAP_prom_RFP => prom_RFP + RNAP; TestTube*koff_prom_rfp*RNAP_prom_RFP;
  mrna_gfp_ribo_on_rxn: mRNA_GFP + Ribo => Ribo_mRNA_GFP; TestTube*kon_mrna_gfp*Ribo*mRNA_GFP;
  mrna_rfp_ribo_on_rxn: mRNA_RFP + Ribo => Ribo_mRNA_RFP; TestTube*kon_mrna_rfp*Ribo*mRNA_RFP;
  mrna_gfp_ribo_off_rxn: Ribo_mRNA_GFP => mRNA_GFP + Ribo; TestTube*koff_mrna_gfp*Ribo_mRNA_GFP;
  mrna_rfp_ribo_off_rxn: Ribo_mRNA_RFP => mRNA_RFP + Ribo; TestTube*koff_mrna_rfp*Ribo_mRNA_RFP;
  tx_gfp_rxn: mrna_gfp_len NTP + RNAP_prom_GFP_elong => RNAP + mRNA_GFP + mrna_gfp_len NTP_tx_gfp_track; TestTube*tx_rate*RNAP_prom_GFP_elong*(a_prime(NTP, Km_ntp_rnap)/(mrna_gfp_len*one_plus_a_prime(NTP, Km_ntp_rnap)));
  tx_rfp_rxn: mrna_rfp_len NTP + RNAP_prom_RFP_elong => RNAP + mRNA_RFP + mrna_rfp_len NTP_tx_rfp_track; TestTube*tx_rate*RNAP_prom_RFP_elong*(a_prime(NTP, Km_ntp_rnap)/(mrna_rfp_len*one_plus_a_prime(NTP, Km_ntp_rnap)));
  tl_gfp_rxn: (2*prot_gfp_len) NTP + prot_gfp_len AA + Ribo_mRNA_GFP_elong => GFP + (2*prot_gfp_len) NMP + (2*prot_gfp_len) NTP_tl_gfp_track + Ribo; TestTube*tl_rate_gfp*(a_prime(AA, Km_aa_ribo)*a_prime(NTP, Km_ntp_ribo)/(prot_gfp_len*one_plus_a_prime(AA, Km_aa_ribo)*one_plus_a_prime(NTP, Km_ntp_ribo)))*Ribo_mRNA_GFP_elong;
  tl_rfp_rxn: (2*prot_rfp_len) NTP + prot_rfp_len AA + Ribo_mRNA_RFP_elong => RFP + (2*prot_rfp_len) NMP + (2*prot_rfp_len) NTP_tl_rfp_track + Ribo; TestTube*tl_rate_rfp*(a_prime(AA, Km_aa_ribo)*a_prime(NTP, Km_ntp_ribo)/(prot_rfp_len*one_plus_a_prime(AA, Km_aa_ribo)*one_plus_a_prime(NTP, Km_ntp_ribo)))*Ribo_mRNA_RFP_elong;
  regen_rxn: NMP + IInd_nrg_src => NTP; TestTube*regen_rate*(a_prime(NMP, Km_nmp_regen)*a_prime(IInd_nrg_src, Km_IInd_nrg_src)/(one_plus_a_prime(NMP, Km_nmp_regen)*one_plus_a_prime(IInd_nrg_src, Km_IInd_nrg_src)));
  tx_gfp_escape_rxn: RNAP_prom_GFP => RNAP_prom_GFP_elong + prom_GFP; TestTube*tx_escape_rate_gfp*RNAP_prom_GFP*(a_prime(NTP, Km_ntp_rnap)/one_plus_a_prime(NTP, Km_ntp_rnap));  // modifiers: NTP
  tx_rfp_escape_rxn: RNAP_prom_RFP => RNAP_prom_RFP_elong + prom_RFP; TestTube*tx_escape_rate_rfp*RNAP_prom_RFP*(a_prime(NTP, Km_ntp_rnap)/one_plus_a_prime(NTP, Km_ntp_rnap));  // modifiers: NTP
  tl_gfp_escape_rxn: Ribo_mRNA_GFP => Ribo_mRNA_GFP_elong + mRNA_GFP; TestTube*tl_escape_rate_gfp*Ribo_mRNA_GFP*(a_prime(NTP, Km_ntp_ribo)/one_plus_a_prime(NTP, Km_ntp_ribo));  // modifiers: NTP
  tl_rfp_escape_rxn: Ribo_mRNA_RFP => Ribo_mRNA_RFP_elong + mRNA_RFP; TestTube*tl_escape_rate_rfp*Ribo_mRNA_RFP*(a_prime(NTP, Km_ntp_ribo)/one_plus_a_prime(NTP, Km_ntp_ribo));  // modifiers: NTP
  ribo_mrna_gfp_deg_rxn: Ribo_mRNA_GFP => mrna_gfp_len NMP + Ribo; TestTube*rna_deg_rate*Ribo_mRNA_GFP;
  ribo_mrna_rfp_deg_rxn: Ribo_mRNA_RFP => mrna_rfp_len NMP + Ribo; TestTube*rna_deg_rate*Ribo_mRNA_RFP;
  ribo_mrna_gfp_elong_deg_rxn: Ribo_mRNA_GFP_elong => Ribo; TestTube*rna_deg_rate*Ribo_mRNA_GFP_elong;
  ribo_mrna_rfp_elong_deg_rxn: Ribo_mRNA_RFP_elong => Ribo; TestTube*rna_deg_rate*Ribo_mRNA_RFP_elong;
  ribo_deg_rxn: Ribo => ; TestTube*ribo_deg_rate*Ribo;
  ribo_elong_deg_gfp_rxn: Ribo_mRNA_GFP_elong => ; TestTube*ribo_deg_rate*Ribo_mRNA_GFP_elong;
  ribo_elong_deg_rfp_rxn: Ribo_mRNA_RFP_elong => ; TestTube*ribo_deg_rate*Ribo_mRNA_RFP_elong;
  ribo_deg_gfp_rxn: Ribo_mRNA_GFP => mRNA_GFP; TestTube*ribo_deg_rate*Ribo_mRNA_GFP;
  ribo_deg_rfp_rxn: Ribo_mRNA_RFP => mRNA_RFP; TestTube*ribo_deg_rate*Ribo_mRNA_RFP;
end
