// SBML level 2 version 4

function f(x)
  x*2;
end

function hill_func(x, K, n)
  1/(1 + (x/K)^n);
end

function a_prime(a, Km)
  a/Km;
end

function one_plus_a_prime(a, Km)
  1 + a_prime(a, Km);
end

model BMegModel()

  // Compartments:
  compartment TestTube = 1;

  // Species:
  species Mat_GFP in TestTube = 0;
  species GFP in TestTube = 0;
  species mRNA_GFP in TestTube = 0;
  species prom_GFP in TestTube = 1;
  species NTP in TestTube = 5000;
  species NMP in TestTube = 0;
  species AA in TestTube = 30000;
  species Ribo in TestTube = 10;
  species RNAP in TestTube = 1;
  species RNAP_prom_GFP in TestTube = 0;
  species RNAP_prom_GFP_elong in TestTube = 0;
  species Ribo_mRNA_GFP in TestTube = 0;
  species Ribo_mRNA_GFP_elong in TestTube = 0;
  species IInd_nrg_src in TestTube = 5000;

  // Parameters:
  tl_rate_gfp = 10000;
  tl_escape_rate_gfp = 100;
  tx_rate = 1000;
  tx_escape_rate_gfp = 100;
  rna_deg_rate_gfp = 0.2;
  gfp_mat_rate = 0.06;
  ntp_deg_rate = 0.01;
  nmp_deg_rate = 0.01;
  Km_ntp_rnap = 0.1;
  Km_ntp_ribo = 10;
  Km_aa_ribo = 1000;
  kon_prom = 1;
  koff_prom_gfp = 4;
  kon_mrna_gfp = 400;
  koff_mrna_gfp = 100;
  mrna_gfp_len = 1150;
  prot_gfp_len = 245;
  regen_rate = 60;
  Km_IInd_nrg_src = 800;
  Km_nmp_regen = 15;
  xylr_conc = 0;
  xylose_conc = 0;
  Kd = 1;
  Kx = 1;
  n = 1;
  m = 1;
  ribo_deg_rate = 0.01;

  // Reactions:
  gfp_mat_rxn: GFP => Mat_GFP; TestTube*gfp_mat_rate*GFP;
  mrna_gfp_deg_rxn: mRNA_GFP => mrna_gfp_len NMP; TestTube*rna_deg_rate_gfp*mRNA_GFP;
  ntp_deg_rxn: NTP => NMP; TestTube*ntp_deg_rate*NTP;
  nmp_deg_rxn: NMP => ; TestTube*nmp_deg_rate*NMP;
  prom_gfp_rnap_on_rxn: prom_GFP + RNAP => RNAP_prom_GFP; TestTube*kon_prom*prom_GFP*RNAP;
  prom_gfp_rnap_off_rxn: RNAP_prom_GFP => prom_GFP + RNAP; TestTube*koff_prom_gfp*RNAP_prom_GFP;
  mrna_gfp_ribo_on_rxn: mRNA_GFP + Ribo => Ribo_mRNA_GFP; TestTube*kon_mrna_gfp*Ribo*mRNA_GFP;
  mrna_gfp_ribo_off_rxn: Ribo_mRNA_GFP => mRNA_GFP + Ribo; TestTube*koff_mrna_gfp*Ribo_mRNA_GFP;
  tx_gfp_rxn: mrna_gfp_len NTP + RNAP_prom_GFP_elong => RNAP + mRNA_GFP; TestTube*tx_rate*RNAP_prom_GFP_elong*(a_prime(NTP, Km_ntp_rnap)/(mrna_gfp_len*one_plus_a_prime(NTP, Km_ntp_rnap)));
  tl_gfp_rxn: (2*prot_gfp_len) NTP + prot_gfp_len AA + Ribo_mRNA_GFP_elong => GFP + (2*prot_gfp_len) NMP + Ribo; TestTube*tl_rate_gfp*(a_prime(AA, Km_aa_ribo)*a_prime(NTP, Km_ntp_ribo)/(prot_gfp_len*one_plus_a_prime(AA, Km_aa_ribo)*one_plus_a_prime(NTP, Km_ntp_ribo)))*Ribo_mRNA_GFP_elong;
  regen_rxn: NMP + IInd_nrg_src => NTP; TestTube*regen_rate*(a_prime(NMP, Km_nmp_regen)*a_prime(IInd_nrg_src, Km_IInd_nrg_src)/(one_plus_a_prime(NMP, Km_nmp_regen)*one_plus_a_prime(IInd_nrg_src, Km_IInd_nrg_src)));
  tx_gfp_escape_rxn: RNAP_prom_GFP => RNAP_prom_GFP_elong + prom_GFP; TestTube*tx_escape_rate_gfp*RNAP_prom_GFP*(a_prime(NTP, Km_ntp_rnap)/one_plus_a_prime(NTP, Km_ntp_rnap));  // modifiers: NTP
  tl_gfp_escape_rxn: Ribo_mRNA_GFP => Ribo_mRNA_GFP_elong + mRNA_GFP; TestTube*tl_escape_rate_gfp*Ribo_mRNA_GFP*(a_prime(NTP, Km_ntp_ribo)/one_plus_a_prime(NTP, Km_ntp_ribo));  // modifiers: NTP
  ribo_mrna_gfp_deg_rxn: Ribo_mRNA_GFP => mrna_gfp_len NMP + Ribo; TestTube*rna_deg_rate_gfp*Ribo_mRNA_GFP;
  ribo_mrna_gfp_elong_deg_rxn: Ribo_mRNA_GFP_elong => Ribo; TestTube*rna_deg_rate_gfp*Ribo_mRNA_GFP_elong;
  ribo_deg_rxn: Ribo => ; TestTube*ribo_deg_rate*Ribo;
  ribo_elong_deg_gfp_rxn: Ribo_mRNA_GFP_elong => ; TestTube*ribo_deg_rate*Ribo_mRNA_GFP_elong;
  ribo_deg_gfp_rxn: Ribo_mRNA_GFP => mRNA_GFP; TestTube*ribo_deg_rate*Ribo_mRNA_GFP;
end
